<?xml version="1.0"?>
<aerodynamics>
   <function name="aero/coefficients/Cla">
      <description>Lift due to alpha</description>
      <product>
      <table name="Cy">
         <independentVar lookup="row">aero/alpha-deg</independentVar>
         <independentVar lookup="column">fcs/wing-sweep</independentVar>
         <tableData>
               0.0    0.5    1.0
         -10  -0.45  -0.36  -0.22
          -5  -0.19  -0.15  -0.10
           0   0.07   0.06   0.04
           5   0.34   0.27   0.17
          10   0.60   0.48   0.29
          15   0.85   0.68   0.41
          20   1.08   0.86   0.52
          25   1.28   1.02   0.62
          30   1.46   1.15   0.69
         </tableData>
      </table>
      <value>1.2</value>
      </product>
   </function>
   <function name="aero/coefficients/Clm">
      <description>Lift due to mach</description>
      <table name="Cm">
         <independentVar lookup="row">velocities/mach</independentVar>
         <independentVar lookup="column">fcs/wing-sweep</independentVar>
         <tableData>
                 0.0     0.5     1.0
           0.2   0.000   0.000   0.000
           0.4   0.001   0.001   0.000
           0.6   0.006   0.003   0.000
           0.8   0.014   0.006   0.000
           1.0   0.006   0.003   0.000
           1.2  -0.006  -0.004   0.000
           1.4  -0.014  -0.010  -0.002
           1.6  -0.014  -0.016  -0.004
           1.8  -0.014  -0.021  -0.007
           2.0  -0.014  -0.026  -0.009
         </tableData>
      </table>
   </function>
   <function name="aero/coefficients/Clf">
      <description>Lift due to flaps</description>
      <product>
          <property>fcs/flap-pos-deg</property>
          <value>0.01</value>
      </product>
   </function>
   <function name="aero/coefficients/Clg">
       <description>Delta Lift due to ground effect</description>
       <table>
           <independentVar lookup="row">position/h-agl-ft</independentVar>
           <tableData>
              0   0.080
              3   0.063
              5   0.053
              7   0.044
             10   0.031
             13   0.021
             16   0.013
             20   0.005
             23   0.002
             25   0.000
           </tableData>
       </table>
   </function>
   <function name="aero/coefficients/Cle">
      <description>Lift due to Elevator Deflection</description>
      <product>
          <property>fcs/elevator-pos-rad</property>
          <value>0.1</value>
      </product>
   </function>

    <function name="aero/coefficients/Cd0">
       <description>Drag due to mach</description>
       <product>
       <table>
          <independentVar lookup="row">velocities/mach</independentVar>
          <independentVar lookup="column">fcs/wing-sweep</independentVar>
          <tableData>
                 0.0     0.5     1.0
           0.2   0.024   0.023   0.021
           0.4   0.024   0.023   0.021
           0.6   0.024   0.023   0.021
           0.8   0.025   0.023   0.022
           1.0   0.050   0.035   0.030
           1.2   0.060   0.044   0.033
           1.4   0.060   0.044   0.032
           1.6   0.060   0.043   0.030
          </tableData>
       </table>
       <value>1.0</value>
       </product>
    </function>
    <function name="aero/coefficients/Cda">
       <description>Drag due to alpha</description>
       <table>
          <independentVar lookup="row">aero/alpha-deg</independentVar>
          <independentVar lookup="column">fcs/wing-sweep</independentVar>
          <tableData>
                0.0    1.0
           -10  0.02   0.02
             0  0.00   0.00
            10  0.02   0.02
            20  0.13   0.08
            30  0.42   0.23
            40  1.09   0.53
          </tableData>
       </table>
    </function>
    <function name="aero/coefficients/Cdf">
       <description>Drag due to flaps</description>
         <product>
           <property>fcs/flap-pos-deg</property>
           <value> 0.001 </value>
         </product>
    </function>
    <function name="aero/coefficients/Cdg">
       <description>Drag due to gear</description>
         <product>
           <property>gear/gear-pos-norm</property>
           <value>0.016</value>
         </product>
    </function>
    <function name="aero/coefficients/Cdb">
       <description>Drag due to speedbrakes</description>
         <product>
           <property>fcs/speedbrake-pos-norm</property>
           <value>0.021</value>
         </product>
    </function>
    <function name="aero/coefficients/Cds">
       <description>Drag due to sideslip</description>
          <table>
            <independentVar lookup="row">aero/beta-rad</independentVar>
            <tableData>
              -1.57   1.23
              -0.26   0.05
               0.00   0.00
               0.26   0.05
               1.57   1.23
            </tableData>
          </table>
    </function>
    <function name="aero/coefficients/Cde">
       <description>Drag due to Elevator Deflection</description>
       <product>
           <abs><property>fcs/elevator-pos-norm</property></abs>
           <value>0.04</value>
       </product>
    </function>

    <function name="aero/coefficients/Csb">
       <description>Side force due to beta</description>
       <product>
           <property>aero/beta-rad</property>
           <value>-1</value>
       </product>
    </function>

    <function name="aero/coefficients/Crb">
       <description>Roll moment due to beta</description>
       <product>
           <property>aero/beta-rad</property>
           <value>-0.01</value>
       </product>
    </function>
    <function name="aero/coefficients/Crd">
       <description>Roll damp</description>
       <product>
           <property>aero/bi2vel</property>
           <property>velocities/p-aero-rad_sec</property>
           <value>-0.4</value>
       </product>
    </function>
    <function name="aero/coefficients/Cry">
       <description>Roll moment due to yaw rate</description>
       <product>
           <property>aero/bi2vel</property>
           <property>velocities/r-aero-rad_sec</property>
           <value>0.15</value>
       </product>
    </function>
    <function name="aero/coefficients/Cra">
       <description>Roll moment due to aileron</description>
       <product>
          <property>fcs/left-aileron-pos-rad</property>
          <table>
            <independentVar lookup="row">velocities/mach</independentVar>
            <tableData>
              0.0    0.16
              1.0    0.10
            </tableData>
          </table>
       </product>
    </function>
    <function name="aero/coefficients/Crr">
       <description>Roll moment due to rudder</description>
       <product>
           <property>fcs/rudder-pos-rad</property>
           <value>0.01</value>
       </product>
    </function>

    <function name="aero/coefficients/Cpa">
       <description>Pitch moment due to alpha</description>
       <product>
           <property>aero/alpha-rad</property>
           <value>-0.4</value>
       </product>
    </function>
    <function name="aero/coefficients/Cpe">
       <description>Pitch moment due to elevator</description>
       <product>
          <property>fcs/elevator-pos-rad</property>
          <table>
            <independentVar lookup="row">velocities/mach</independentVar>
            <tableData>
              0.0     -0.800
              2.0     -0.200
            </tableData>
          </table>
       </product>
    </function>
    <function name="aero/coefficients/Cpd">
       <description>Pitch damp</description>
       <product>
           <property>aero/ci2vel</property>
           <property>velocities/q-aero-rad_sec</property>
           <value>-30</value>
       </product>
    </function>
    <function name="aero/coefficients/Cpr">
       <description>Pitch moment due to alpha rate</description>
       <product>
           <property>aero/ci2vel</property>
           <property>aero/alphadot-rad_sec</property>
           <value>-9</value>
       </product>
    </function>

    <function name="aero/coefficients/Cyb">
       <description>Yaw moment due to beta</description>
       <product>
           <property>aero/beta-rad</property>
           <value>0.12</value>
       </product>
    </function>
    <function name="aero/coefficients/Cyd">
       <description>Yaw damp</description>
       <product>
           <property>aero/bi2vel</property>
           <property>velocities/r-aero-rad_sec</property>
           <value>-0.15</value>
       </product>
    </function>
    <function name="aero/coefficients/Cyr">
       <description>Yaw moment due to rudder</description>
       <product>
           <property>fcs/rudder-pos-rad</property>
           <value>-0.1</value>
       </product>
    </function>

        <axis name="LIFT">
            <function name="aero/force/LIFT">
                <description>LIFT Force</description>
                <product>
                    <property>aero/qbar-psf</property>
                    <sum>
                        <property>metrics/Sw-sqft</property>
                        <property>metrics/Sh-sqft</property>
                    </sum>
                    <sum>
                        <property>aero/coefficients/Cla</property>
                        <property>aero/coefficients/Clm</property>
                        <property>aero/coefficients/Clf</property>
                        <!--<property>aero/coefficients/Clg</property>-->
                        <property>aero/coefficients/Cle</property>
                    </sum>
                </product>
            </function>
        </axis>
        <axis name="DRAG">
            <function name="aero/force/DRAG">
                <description>DRAG Force</description>
                <product>
                    <property>aero/qbar-psf</property>
                    <sum>
                        <property>metrics/Sw-sqft</property>
                        <property>metrics/Sh-sqft</property>
                    </sum>
                    <sum>
                        <property>aero/coefficients/Cd0</property>
                        <property>aero/coefficients/Cda</property>
                        <property>aero/coefficients/Cdb</property>
                        <property>aero/coefficients/Cdf</property>
                        <property>aero/coefficients/Cdg</property>
                    </sum>
                </product>
            </function>
        </axis>
        <axis name="SIDE">
            <function name="aero/force/SIDE">
                <description>SIDE Force</description>
                <product>
                    <property>aero/qbar-psf</property>
                    <sum>
                        <property>metrics/Sw-sqft</property>
                        <property>metrics/Sh-sqft</property>
                    </sum>
                    <property>aero/coefficients/Csb</property>
                </product>
            </function>
        </axis>
        <axis name="ROLL">
            <function name="aero/force/ROLL">
                <description>ROLL Moment</description>
                <product>
                    <property>aero/qbar-psf</property>
                    <sum>
                        <property>metrics/Sw-sqft</property>
                        <property>metrics/Sh-sqft</property>
                    </sum>
                    <property>metrics/bw-ft</property>
                    <sum>
                        <property>aero/coefficients/Cra</property>
                        <property>aero/coefficients/Crd</property>
                    </sum>
                </product>
            </function>
        </axis>
        <axis name="PITCH">
            <function name="aero/force/PITCH">
                <description>PITCH Moment</description>
                <product>
                    <property>aero/qbar-psf</property>
                    <sum>
                        <property>metrics/Sw-sqft</property>
                        <property>metrics/Sh-sqft</property>
                    </sum>
                    <property>metrics/cbarw-ft</property>
                    <sum>
                        <property>aero/coefficients/Cpd</property>
                        <property>aero/coefficients/Cpr</property>
                        <property>aero/coefficients/Cpe</property>
                    </sum>
                </product>
            </function>
        </axis>
        <axis name="YAW">
            <function name="aero/force/YAW">
                <description>YAW Moment</description>
                <product>
                    <property>aero/qbar-psf</property>
                    <sum>
                        <property>metrics/Sw-sqft</property>
                        <property>metrics/Sh-sqft</property>
                    </sum>
                    <property>metrics/bw-ft</property>
                    <sum>
                        <property>aero/coefficients/Cyb</property>
                        <property>aero/coefficients/Cyd</property>
                        <property>aero/coefficients/Cyr</property>
                    </sum>
                 </product>
            </function>
        </axis>
 </aerodynamics>
