<?xml version="1.0"?>
<?xml-stylesheet type="text/xsl" href="http://jsbsim.sourceforge.net/JSBSim.xsl"?>
<fdm_config name="Tornado-Jsb" version="2.0" release="ALPHA"
   xmlns:xsi="http://www.w3.org/2001/XMLSchema-instance"
   xsi:noNamespaceSchemaLocation="http://jsbsim.sourceforge.net/JSBSim.xsd">

 <fileheader>
  <author> Aeromatic v 0.95 </author>
  <filecreationdate>2015-05-23</filecreationdate>
  <version>$Revision: 1.15 $</version>
  <description> Models a Tornado-Jsb. </description>
 </fileheader>

<!--
  File:     Tornado-Jsb.xml
  Inputs:
    name:          Tornado-Jsb
    type:          two-engine transonic/supersonic fighter
    max weight:    61700 lb
    wing span:     40.0 ft
    length:        54'10" ft
    wing area:     286 sq-ft
    gear type:     tricycle
    retractable?:  yes
    # engines:     2
    engine type:   turbine
    engine layout: aft fuselage
    yaw damper?    yes
  Outputs:
    wing loading:  215.73 lb/sq-ft
    payload:       18308.1 lbs
    CL-alpha:      3.6 per radian
    CL-0:          0.08
    CL-max:        1
    CD-0:          0.024
    K:             0.12
-->

 <metrics>
   <wingarea  unit="M2">  47.28 </wingarea>
   <wingspan  unit="M" >  16.22 </wingspan>
   <wing_incidence>        0.00 </wing_incidence>
   <chord     unit="M" >   3.37 </chord>
   <htailarea unit="FT2"> 57.20 </htailarea>
   <htailarm  unit="FT" > 18.60 </htailarm>
   <vtailarea unit="FT2"> 61.48 </vtailarea>
   <vtailarm  unit="FT" > 24.60 </vtailarm>
   <location name="AERORP" unit="M">
     <x> 10.0 </x>
     <y>  0.0 </y>
     <z> -0.3 </z>
   </location>
   <location name="EYEPOINT" unit="M">
     <x> 4.0 </x>
     <y> 0.0 </y>
     <z> 0.7 </z>
   </location>
   <location name="VRP" unit="M">
     <x> 8.0 </x>
     <y> 0.0 </y>
     <z> 0.8 </z>
   </location>
 </metrics>

 <mass_balance>
   <ixx unit="SLUG*FT2">  40000 </ixx>
   <iyy unit="SLUG*FT2"> 120000 </iyy>
   <izz unit="SLUG*FT2"> 150000 </izz>
   <emptywt unit="LBS" >  30620 </emptywt>
   <location name="CG" unit="M">
     <x> 9.2 </x>
     <y> 0.0 </y>
     <z>-0.3 </z>
   </location>
   <pointmass name="Payload">
    <description> 18308 LBS + full (12772 LBS) fuel should bring model up to entered max weight</description>
    <weight unit="LBS">   9154.0 </weight>
    <location name="POINTMASS" unit="M">
      <x> 9.2 </x>
      <y> 0.0 </y>
      <z>-0.3 </z>
    </location>
  </pointmass>
 </mass_balance>

 <ground_reactions>
  <contact type="BOGEY" name="NOSE">
   <location unit="IN">
     <x>  84.24 </x>
     <y>   0.00 </y>
     <z> -77.76 </z>
   </location>
   <static_friction>  0.80 </static_friction>
   <dynamic_friction> 0.50 </dynamic_friction>
   <rolling_friction> 0.02 </rolling_friction>
   <spring_coeff unit="LBS/FT">      18510.00 </spring_coeff>
   <damping_coeff unit="LBS/FT/SEC">  9850.00 </damping_coeff>
   <max_steer unit="DEG"> 45.00 </max_steer>
   <brake_group>NONE</brake_group>
   <retractable>1</retractable>
  </contact>

  <contact type="BOGEY" name="LEFT_MAIN">
   <location unit="IN">
     <x> 404.35 </x>
     <y> -43.20 </y>
     <z> -77.76 </z>
   </location>
   <static_friction>  0.80 </static_friction>
   <dynamic_friction> 0.50 </dynamic_friction>
   <rolling_friction> 0.02 </rolling_friction>
   <spring_coeff unit="LBS/FT">      61700.00 </spring_coeff>
   <damping_coeff unit="LBS/FT/SEC"> 30850.00 </damping_coeff>
   <max_steer unit="DEG">0</max_steer>
   <brake_group>LEFT</brake_group>
   <retractable>1</retractable>
  </contact>

  <contact type="BOGEY" name="RIGHT_MAIN">
   <location unit="IN">
     <x> 404.35 </x>
     <y>  43.20 </y>
     <z> -77.76 </z>
   </location>
   <static_friction>  0.80 </static_friction>
   <dynamic_friction> 0.50 </dynamic_friction>
   <rolling_friction> 0.02 </rolling_friction>
   <spring_coeff unit="LBS/FT">      61700.00 </spring_coeff>
   <damping_coeff unit="LBS/FT/SEC"> 30850.00 </damping_coeff>
   <max_steer unit="DEG">0</max_steer>
   <brake_group>RIGHT</brake_group>
   <retractable>1</retractable>
  </contact>

  <contact type="STRUCTURE" name="LEFT_WING">
    <location unit="IN">
     <x> 388.80 </x>
     <y> -20.00 </y>
     <z> -16.20 </z>
    </location>
    <static_friction>  1.00 </static_friction>
    <dynamic_friction> 1.00 </dynamic_friction>
    <spring_coeff unit="LBS/FT">      61700.00 </spring_coeff>
    <damping_coeff unit="LBS/FT/SEC"> 61700.00 </damping_coeff>
  </contact>

  <contact type="STRUCTURE" name="RIGHT_WING">
    <location unit="IN">
     <x> 388.80 </x>
     <y>  20.00 </y>
     <z> -16.20 </z>
    </location>
    <static_friction>  1.00 </static_friction>
    <dynamic_friction> 1.00 </dynamic_friction>
    <spring_coeff unit="LBS/FT">      61700.00 </spring_coeff>
    <damping_coeff unit="LBS/FT/SEC"> 61700.00 </damping_coeff>
  </contact>
 </ground_reactions>

 <propulsion>
   <engine file="RB199-34R">
    <location unit="IN">
      <x> 588.00 </x>
      <y> -20.00 </y>
      <z>   0.00 </z>
    </location>
    <orient unit="DEG">
      <pitch> 0.00 </pitch>
      <roll>  0.00 </roll>
      <yaw>   0.00 </yaw>
    </orient>
    <feed>0</feed>
    <feed>2</feed>
    <thruster file="direct">
     <location unit="IN">
       <x> 588.00 </x>
       <y> -20.00 </y>
       <z>   0.00 </z>
     </location>
     <orient unit="DEG">
       <pitch> 0.00 </pitch>
       <roll>  0.00 </roll>
       <yaw>   0.00 </yaw>
     </orient>
    </thruster>
  </engine>

   <engine file="RB199-34R">
    <location unit="IN">
      <x> 588.00 </x>
      <y>  20.00 </y>
      <z>   0.00 </z>
    </location>
    <orient unit="DEG">
      <pitch> 0.00 </pitch>
      <roll>  0.00 </roll>
      <yaw>   0.00 </yaw>
    </orient>
    <feed>1</feed>
    <feed>2</feed>
    <thruster file="direct">
     <location unit="IN">
       <x> 588.00 </x>
       <y>  20.00 </y>
       <z>   0.00 </z>
     </location>
     <orient unit="DEG">
       <pitch> 0.00 </pitch>
       <roll>  0.00 </roll>
       <yaw>   0.00 </yaw>
     </orient>
    </thruster>
  </engine>

  <tank type="FUEL" number="0">
     <location unit="IN">
       <x> 388.80 </x>
       <y> -10.00 </y>
       <z> -16.20 </z>
     </location>
     <priority>1</priority>
     <capacity unit="LBS"> 4158 </capacity>
     <contents unit="LBS"> 4158 </contents>
  </tank>

  <tank type="FUEL" number="1">
     <location unit="IN">
       <x> 388.80 </x>
       <y>  10.00 </y>
       <z> -16.20 </z>
     </location>
     <priority>1</priority>
     <capacity unit="LBS"> 4158 </capacity>
     <contents unit="LBS"> 4158 </contents>
  </tank>

  <tank type="FUEL" number="2">
     <location unit="IN">
       <x> 388.80 </x>
       <y>   0.00 </y>
       <z> -16.20 </z>
     </location>
     <priority>2</priority>
     <capacity unit="LBS"> 11211 </capacity>
     <contents unit="LBS"> 11211 </contents>
  </tank>
 </propulsion>

 <flight_control name="FCS: Tornado-Jsb">
  <channel name="Pitch">
   <summer name="Pitch Trim Sum">
      <input>fcs/elevator-cmd-norm</input>
      <input>fcs/pitch-trim-cmd-norm</input>
      <clipto>
        <min> -1 </min>
        <max>  1 </max>
      </clipto>
   </summer>

   <aerosurface_scale name="Elevator Control">
      <input>fcs/pitch-trim-sum</input>
      <range>
        <min> -0.35 </min>
        <max>  0.35 </max>
      </range>
      <output>fcs/elevator-pos-rad</output>
   </aerosurface_scale>

   <aerosurface_scale name="elevator normalization">
      <input>fcs/elevator-pos-rad</input>
      <domain>
        <min> -0.35 </min>
        <max>  0.35 </max>
      </domain>
      <range>
        <min> -1 </min>
        <max>  1 </max>
      </range>
      <output>fcs/elevator-pos-norm</output>
   </aerosurface_scale>
  </channel>

  <channel name="Roll">
   <summer name="Roll Trim Sum">
      <input>fcs/aileron-cmd-norm</input>
      <input>fcs/roll-trim-cmd-norm</input>
      <clipto>
        <min> -1 </min>
        <max>  1 </max>
      </clipto>
   </summer>

   <aerosurface_scale name="Left Aileron Control">
      <input>fcs/roll-trim-sum</input>
      <range>
        <min> -0.35 </min>
        <max>  0.35 </max>
      </range>
      <output>fcs/left-aileron-pos-rad</output>
   </aerosurface_scale>

   <aerosurface_scale name="Right Aileron Control">
      <input>fcs/roll-trim-sum</input>
      <range>
        <min> -0.35 </min>
        <max>  0.35 </max>
      </range>
      <output>fcs/right-aileron-pos-rad</output>
   </aerosurface_scale>

   <aerosurface_scale name="left aileron normalization">
      <input>fcs/left-aileron-pos-rad</input>
      <domain>
        <min> -0.35 </min>
        <max>  0.35 </max>
      </domain>
      <range>
        <min> -1 </min>
        <max>  1 </max>
      </range>
      <output>fcs/left-aileron-pos-norm</output>
   </aerosurface_scale>

   <aerosurface_scale name="right aileron normalization">
      <input>fcs/right-aileron-pos-rad</input>
      <domain>
        <min> -0.35 </min>
        <max>  0.35 </max>
      </domain>
      <range>
        <min> -1 </min>
        <max>  1 </max>
      </range>
      <output>fcs/right-aileron-pos-norm</output>
   </aerosurface_scale>
  </channel>

  <property value="1">fcs/yaw-damper-enable</property>

  <channel name="Yaw">
   <summer name="Rudder Command Sum">
      <input>fcs/rudder-cmd-norm</input>
      <input>fcs/yaw-trim-cmd-norm</input>
      <clipto>
        <min> -1 </min>
        <max>  1 </max>
      </clipto>
   </summer>

   <scheduled_gain name="Yaw Damper Rate">
      <input>velocities/r-aero-rad_sec</input>
      <table>
        <independentVar lookup="row">velocities/ve-kts</independentVar>
         <tableData>
            30     0.00
            60     2.00
         </tableData>
      </table>
      <gain>fcs/yaw-damper-enable</gain>
   </scheduled_gain>

   <summer name="Rudder Sum">
      <input>fcs/rudder-command-sum</input>
      <input>fcs/yaw-damper-rate</input>
      <clipto>
        <min> -1.1 </min>
        <max>  1.1 </max>
      </clipto>
   </summer>

   <aerosurface_scale name="Rudder Control">
      <input>fcs/rudder-sum</input>
      <domain>
        <min> -1.1 </min>
        <max>  1.1 </max>
      </domain>
      <range>
        <min> -0.35 </min>
        <max>  0.35 </max>
      </range>
      <output>fcs/rudder-pos-rad</output>
   </aerosurface_scale>

   <aerosurface_scale name="rudder normalization">
      <input>fcs/rudder-pos-rad</input>
      <domain>
        <min> -0.35 </min>
        <max>  0.35 </max>
      </domain>
      <range>
        <min> -1 </min>
        <max>  1 </max>
      </range>
      <output>fcs/rudder-pos-norm</output>
   </aerosurface_scale>
  </channel>

  <channel name="Flaps">
   <kinematic name="Flaps Control">
     <input>fcs/flap-cmd-norm</input>
     <traverse>
       <setting>
          <position>  0 </position>
          <time>      0 </time>
       </setting>
       <setting>
          <position> 15 </position>
          <time>      4 </time>
       </setting>
       <setting>
          <position> 30 </position>
          <time>      3 </time>
       </setting>
     </traverse>
     <output>fcs/flap-pos-deg</output>
   </kinematic>

   <aerosurface_scale name="flap normalization">
      <input>fcs/flap-pos-deg</input>
      <domain>
        <min>  0 </min>
        <max> 30 </max>
      </domain>
      <range>
        <min> 0 </min>
        <max> 1 </max>
      </range>
      <output>fcs/flap-pos-norm</output>
   </aerosurface_scale>
  </channel>

  <channel name="Landing Gear">
   <kinematic name="Gear Control">
     <input>gear/gear-cmd-norm</input>
     <traverse>
       <setting>
          <position> 0 </position>
          <time>     0 </time>
       </setting>
       <setting>
          <position> 1 </position>
          <time>     5 </time>
       </setting>
     </traverse>
     <output>gear/gear-pos-norm</output>
   </kinematic>

  </channel>
	<channel name="Wings">
		<aerosurface_scale name="flap normalization">
			<input>fcs/wing-sweep-cmd</input>
			<domain>
				<min> 0 </min>
				<max> 2 </max>
			</domain>
			<range>
				<min> 0 </min>
				<max> 1 </max>
			</range>
			<output>fcs/wing-sweep-norm</output>
		</aerosurface_scale>

		<kinematic name="Wing Sweep">
			<input>fcs/wing-sweep-norm</input>
			<traverse>
				<setting>
					<position> 0 </position>
					<time>     0 </time>
				</setting>
				<setting>
					<position> 0.5 </position>
					<time>     10 </time>
				</setting>
				<setting>
					<position> 1 </position>
					<time>     7 </time>
				</setting>
			</traverse>
			<output>fcs/wing-sweep</output>
		</kinematic>
	</channel>

  <channel name="Speedbrake">
   <kinematic name="Speedbrake Control">
     <input>fcs/speedbrake-cmd-norm</input>
     <traverse>
       <setting>
          <position> 0 </position>
          <time>     0 </time>
       </setting>
       <setting>
          <position> 1 </position>
          <time>     1 </time>
       </setting>
     </traverse>
     <output>fcs/speedbrake-pos-norm</output>
   </kinematic>
  </channel>
 </flight_control>

 <aerodynamics>
  <axis name="LIFT">
    <function name="aero/force/Lift_alpha">
      <description>Lift due to alpha</description>
      <product>
          <property>aero/qbar-psf</property>
          <property>metrics/Sw-sqft</property>
            <table name="Cy">
                <independentVar lookup="row">aero/alpha-rad</independentVar>
                <independentVar lookup="column">fcs/wing-sweep</independentVar>
                <tableData>
                        0.0   0.5   1.0
                 0.00   0.0   0.0   0.1
                 0.17   0.3   0.4   0.5
                 0.35   0.5   0.7   0.9
                 0.52   0.8   1.0   1.0
                </tableData>
            </table>
      </product>
    </function>

    <function name="aero/force/Lift_flap">
       <description>Delta Lift due to flaps</description>
       <product>
           <property>aero/qbar-psf</property>
           <property>metrics/Sw-sqft</property>
           <property>fcs/flap-pos-deg</property>
           <value> 0.025 </value>
       </product>
    </function>

    <function name="aero/force/Lift_speedbrake">
       <description>Delta Lift due to speedbrake</description>
       <product>
           <property>aero/qbar-psf</property>
           <property>metrics/Sw-sqft</property>
           <property>fcs/speedbrake-pos-norm</property>
           <value>0</value>
       </product>
    </function>

    <function name="aero/force/Lift_elevator">
       <description>Lift due to Elevator Deflection</description>
       <product>
           <property>aero/qbar-psf</property>
           <property>metrics/Sw-sqft</property>
           <property>fcs/elevator-pos-rad</property>
           <value>0.2</value>
       </product>
    </function>

    <function name="aero/force/debug1">
            <table name="Cx0">
                <independentVar lookup="row">velocities/mach</independentVar>
                <independentVar lookup="column">fcs/wing-sweep</independentVar>
                <tableData>
                       0.0     0.5     1.0
                 0.2   0.021   0.022   0.024
                 0.4   0.021   0.022   0.024
                 0.6   0.021   0.023   0.024
                 0.8   0.022   0.023   0.025
                 1.0   0.030   0.035   0.040
                 1.2   0.035   0.045   0.080
                 1.4   0.032   0.044   0.160
                </tableData>
            </table>
    </function>
    <function name="aero/force/debug2">
            <table name="Cxi">
                <independentVar lookup="row">aero/alpha-rad</independentVar>
                <independentVar lookup="column">fcs/wing-sweep</independentVar>
                <tableData>
                        0.0    0.5    1.0
                 0.00   0.00   0.00   0.00
                 0.17   0.03   0.03   0.02
                 0.35   0.08   0.11   0.15
                 0.52   0.22   0.28   0.22
                </tableData>
            </table>
    </function>
  </axis>

  <axis name="DRAG">
    <function name="aero/force/Drag_basic">
       <description>Drag at zero lift</description>
       <product>
          <property>aero/qbar-psf</property>
          <property>metrics/Sw-sqft</property>
          <sum>
            <!-- <value name="Cx0">0.02</value> -->
            <table name="Cx0">
                <independentVar lookup="row">velocities/mach</independentVar>
                <independentVar lookup="column">fcs/wing-sweep</independentVar>
                <tableData>
                       0.0     0.5     1.0
                 0.2   0.021   0.022   0.024
                 0.4   0.021   0.022   0.024
                 0.6   0.021   0.023   0.024
                 0.8   0.022   0.023   0.025
                 1.0   0.030   0.035   0.040
                 1.2   0.035   0.045   0.080
                 1.4   0.032   0.044   0.160
                </tableData>
            </table>
            <table name="Cxi">
                <independentVar lookup="row">aero/alpha-rad</independentVar>
                <independentVar lookup="column">fcs/wing-sweep</independentVar>
                <tableData>
                        0.0    0.5    1.0
                 0.00   0.00   0.00   0.00
                 0.17   0.03   0.03   0.02
                 0.35   0.08   0.11   0.15
                 0.52   0.22   0.28   0.22
                </tableData>
            </table>
          </sum>
       </product>
    </function>

    <function name="aero/force/Drag_flap">
       <description>Drag due to flaps</description>
         <product>
           <property>aero/qbar-psf</property>
           <property>metrics/Sw-sqft</property>
           <property>fcs/flap-pos-deg</property>
           <value> 0.00100 </value>
         </product>
    </function>

    <function name="aero/force/Drag_gear">
       <description>Drag due to gear</description>
         <product>
           <property>aero/qbar-psf</property>
           <property>metrics/Sw-sqft</property>
           <property>gear/gear-pos-norm</property>
           <value>0.002</value>
         </product>
    </function>

    <function name="aero/force/Drag_speedbrake">
       <description>Drag due to speedbrakes</description>
         <product>
           <property>aero/qbar-psf</property>
           <property>metrics/Sw-sqft</property>
           <property>fcs/speedbrake-pos-norm</property>
           <value>0.024</value>
         </product>
    </function>

    <function name="aero/force/Drag_beta">
       <description>Drag due to sideslip</description>
       <product>
          <property>aero/qbar-psf</property>
          <property>metrics/Sw-sqft</property>
          <table>
            <independentVar lookup="row">aero/beta-rad</independentVar>
            <tableData>
              -1.57    1.230
              -0.26    0.050
               0.00    0.000
               0.26    0.050
               1.57    1.230
            </tableData>
          </table>
       </product>
    </function>

    <function name="aero/force/Drag_elevator">
       <description>Drag due to Elevator Deflection</description>
       <product>
           <property>aero/qbar-psf</property>
           <property>metrics/Sw-sqft</property>
           <abs><property>fcs/elevator-pos-norm</property></abs>
           <value>0.04</value>
       </product>
    </function>

  </axis>

  <axis name="SIDE">

    <function name="aero/force/Side_beta">
       <description>Side force due to beta</description>
       <product>
           <property>aero/qbar-psf</property>
           <property>metrics/Sw-sqft</property>
           <property>aero/beta-rad</property>
           <value>-1</value>
       </product>
    </function>

  </axis>

  <axis name="ROLL">

    <function name="aero/moment/Roll_beta">
       <description>Roll moment due to beta</description>
       <product>
           <property>aero/qbar-psf</property>
           <property>metrics/Sw-sqft</property>
           <property>metrics/bw-ft</property>
           <property>aero/beta-rad</property>
           <value>-0.1</value>
       </product>
    </function>

    <function name="aero/moment/Roll_damp">
       <description>Roll moment due to roll rate</description>
       <product>
           <property>aero/qbar-psf</property>
           <property>metrics/Sw-sqft</property>
           <property>metrics/bw-ft</property>
           <property>aero/bi2vel</property>
           <property>velocities/p-aero-rad_sec</property>
           <value>-0.4</value>
       </product>
    </function>

    <function name="aero/moment/Roll_yaw">
       <description>Roll moment due to yaw rate</description>
       <product>
           <property>aero/qbar-psf</property>
           <property>metrics/Sw-sqft</property>
           <property>metrics/bw-ft</property>
           <property>aero/bi2vel</property>
           <property>velocities/r-aero-rad_sec</property>
           <value>0.15</value>
       </product>
    </function>

    <function name="aero/moment/Roll_aileron">
       <description>Roll moment due to aileron</description>
       <product>
          <property>aero/qbar-psf</property>
          <property>metrics/Sw-sqft</property>
          <property>metrics/bw-ft</property>
          <property>fcs/left-aileron-pos-rad</property>
          <value>0.12</value>
       </product>
    </function>

    <function name="aero/moment/Roll_rudder">
       <description>Roll moment due to rudder</description>
       <product>
           <property>aero/qbar-psf</property>
           <property>metrics/Sw-sqft</property>
           <property>metrics/bw-ft</property>
           <property>fcs/rudder-pos-rad</property>
           <value>0.01</value>
       </product>
    </function>

  </axis>

  <axis name="PITCH">

    <function name="aero/moment/Pitch_alpha">
       <description>Pitch moment due to alpha</description>
       <product>
           <property>aero/qbar-psf</property>
           <property>metrics/Sw-sqft</property>
           <property>metrics/cbarw-ft</property>
           <property>aero/alpha-rad</property>
           <value>-0.3</value>
       </product>
    </function>

    <function name="aero/moment/Pitch_elevator">
       <description>Pitch moment due to elevator</description>
       <product>
          <property>aero/qbar-psf</property>
          <property>metrics/Sw-sqft</property>
          <property>metrics/cbarw-ft</property>
          <property>fcs/elevator-pos-rad</property>
          <table>
            <independentVar lookup="row">velocities/mach</independentVar>
            <tableData>
              0.0     -0.800
              2.0     -0.200
            </tableData>
          </table>
       </product>
    </function>

    <function name="aero/moment/Pitch_damp">
       <description>Pitch moment due to pitch rate</description>
       <product>
           <property>aero/qbar-psf</property>
           <property>metrics/Sw-sqft</property>
           <property>metrics/cbarw-ft</property>
           <property>aero/ci2vel</property>
           <property>velocities/q-aero-rad_sec</property>
           <value>-18</value>
       </product>
    </function>

    <function name="aero/moment/Pitch_alphadot">
       <description>Pitch moment due to alpha rate</description>
       <product>
           <property>aero/qbar-psf</property>
           <property>metrics/Sw-sqft</property>
           <property>metrics/cbarw-ft</property>
           <property>aero/ci2vel</property>
           <property>aero/alphadot-rad_sec</property>
           <value>-9</value>
       </product>
    </function>

  </axis>

  <axis name="YAW">

    <function name="aero/moment/Yaw_beta">
       <description>Yaw moment due to beta</description>
       <product>
           <property>aero/qbar-psf</property>
           <property>metrics/Sw-sqft</property>
           <property>metrics/bw-ft</property>
           <property>aero/beta-rad</property>
           <value>0.12</value>
       </product>
    </function>

    <function name="aero/moment/Yaw_damp">
       <description>Yaw moment due to yaw rate</description>
       <product>
           <property>aero/qbar-psf</property>
           <property>metrics/Sw-sqft</property>
           <property>metrics/bw-ft</property>
           <property>aero/bi2vel</property>
           <property>velocities/r-aero-rad_sec</property>
           <value>-0.15</value>
       </product>
    </function>

    <function name="aero/moment/Yaw_rudder">
       <description>Yaw moment due to rudder</description>
       <product>
           <property>aero/qbar-psf</property>
           <property>metrics/Sw-sqft</property>
           <property>metrics/bw-ft</property>
           <property>fcs/rudder-pos-rad</property>
           <value>-0.1</value>
       </product>
    </function>

    <function name="aero/moment/Yaw_aileron">
       <description>Adverse yaw</description>
       <product>
           <property>aero/qbar-psf</property>
           <property>metrics/Sw-sqft</property>
           <property>metrics/bw-ft</property>
           <property>fcs/left-aileron-pos-rad</property>
           <value>0</value>
       </product>
    </function>

  </axis>

 </aerodynamics>

 <external_reactions>
 </external_reactions>

</fdm_config>
